<?xml version="1.0" encoding="iso-8859-1"?>
<neuroml xmlns="http://www.neuroml.org/schema/neuroml2"
    xmlns:xsi="http://www.w3.org/2001/XMLSchema-instance"
    xsi:schemaLocation="http://www.neuroml.org/schema/neuroml2  https://raw.github.com/NeuroML/NeuroML2/master/Schemas/NeuroML2/NeuroML_v2beta.xsd"
    id="Leak">

    <notes>ChannelML file containing a single Channel description for a passive leak conductance</notes>

    <ionChannel id="Leak" conductance="10pS" type="ionChannelPassive"/>

</neuroml>
