<Lems>

    <!-- Example with Simple Hodgin-Huxley cell specifying segment details-->

    <!-- This is a file which can be read and executed by the LEMS Interpreter.
         It imports the LEMS definitions of the core NeuroML 2 Components,
         imports in "pure" NeuroML 2 and contains some LEMS elements for running
         a simulation -->

    <!-- This is a modified version to duplicate the values and charts used in
        https://gist.github.com/slarson/37463b35ef8606629d2e#file-hodgkin-huxley-py -->

    <Target component="sim1"/>

    <Include file="Cells.xml"/>
    <Include file="Networks.xml"/>
    <Include file="Simulation.xml"/>

    <!-- Including file with a <neuroml> root, a "real" NeuroML 2 file -->
    <Include file="./NML2_SingleCompHHCell.nml"/>

    <Simulation id="sim1" length="450ms" step="0.01ms" target="net1">

        <Display id="d1" title="Hodgkin-Huxley Neuron: V (mV)" timeScale="1ms" xmin="0" xmax="450" ymin="-90" ymax="50">
                <Line id="v" quantity="hhpop[0]/v" scale="1mV" color="#ffffff" timeScale="1ms"/>
        </Display>

        <Display id="d2" title="Hodgkin-Huxley Neuron: Gating Value" timeScale="1ms" xmin="0" xmax="450" ymin="-0.1" ymax="1.1">
                <Line id="m" quantity="hhpop[0]/bioPhys1/membraneProperties/naChans/naChan/m/q" scale="1"  color="#000000" timeScale="1ms"/>
                <Line id="h" quantity="hhpop[0]/bioPhys1/membraneProperties/naChans/naChan/h/q" scale="1"  color="#ff0000" timeScale="1ms"/>
                <Line id="n" quantity="hhpop[0]/bioPhys1/membraneProperties/kChans/kChan/n/q" scale="1"  color="#0000ff" timeScale="1ms"/>
        </Display>

        <Display id="d3" title="Hodgkin-Huxley Neuron: Current" timeScale="1ms" xmin="0" xmax="450" ymin="-10" ymax="10">
                <Line id="I_na" quantity="hhpop[0]/bioPhys1/membraneProperties/naChans/iDensity" scale="1"  color="#000000" timeScale="1ms"/>
                <Line id="I_k" quantity="hhpop[0]/bioPhys1/membraneProperties/kChans/iDensity" scale="1"  color="#ff0000" timeScale="1ms"/>
                <Line id="I_l" quantity="hhpop[0]/bioPhys1/membraneProperties/leak/iDensity" scale="1"  color="#ff0000" timeScale="1ms"/>
        </Display>

        <!-- This doesn't work.  I'm trying to get the input current densities but I don't
             know what quantity gives me those values.  Currently it references hhpop[0]/iChannels
             but that's just a placeholder-->
        <Display id="d4" title="Hodgkin-Huxley Neuron: I_inj ( mu_A / cm^2)" timeScale="1ms" xmin="0" xmax="450" ymin="-1" ymax="40">
                <Line id="I_inj" quantity="hhpop[0]/iChannels" scale="1"  color="#004040" timeScale="1ms"/>
        </Display>

        <OutputFile id="of0" fileName="results/hh_v.dat">
            <OutputColumn id="v" quantity="hhpop[0]/v"/>
        </OutputFile>

        <OutputFile id="of1" fileName="results/hh_vars.dat">
            <OutputColumn id="m" quantity="hhpop[0]/bioPhys1/membraneProperties/naChans/naChan/m/q"/>
            <OutputColumn id="h" quantity="hhpop[0]/bioPhys1/membraneProperties/naChans/naChan/h/q"/>
            <OutputColumn id="n" quantity="hhpop[0]/bioPhys1/membraneProperties/kChans/kChan/n/q"/>
        </OutputFile>

    </Simulation>

</Lems>
